# 2. Проектирование
# 2.1. Проектирование стабилизатора напряжения
Uвых := 8 V
Iнmax := 400 mA
αmax := 0.12
αmin := 0.1
Uвх.стmin := Uвых + 3 V = 11 V
Uвх.ст.ном := Uвх.стmin/(1 - αmin) = 12.2222 V
Uвх.стmax := Uвх.ст.ном*(1 + αmax) = 13.6889 V
Iвх.стmax := 1.2*Iнmax = 480 mA
# Выбор стабилитрона VD1
Uст.расч := 0.8*Uвых = 6.4 V
Iстmin := 50 mA
Iстmax := 1.15 A = 1150 mA
Pmax := 8 W
# Выбор транзистора VT1
IKVT1maxрасч := Iвх.стmax = 480 mA
UКЭVT1maxрасч := Uвх.стmax - Uвых = 5.68889 V
PVT1maxрасч := (Uвх.стmax - Uвых)*Iвх.стmax = 2.73067 W
IKOVT1 := 5000 μA = 5 mA
βVT1 := 30
# Выбор транзистора VT2
IKVT1 := 0.5 A
IKVT2 := IKVT1/βVT1 = 16.6667 mA
UКЭVT2maxрасч := Uвх.стmax - Uвых = 5.68889 V
PVT2maxрасч := (Uвх.стmax - Uвых)*IKVT2 = 94.8148 mW
IKOVT2 := 50 μA
βVT2 := 40
# Выбор транзистора VT 3
IKVT3 := IKVT2/βVT2 = 0.416667 mA
# Выбор транзистора VT 4
UVD1 := Uст.расч = 6.4 V
UКЭVT4maxрасч := Uвых - UVD1 = 1.6 V
# Выбор резистора R1
Uвх.ном := Uвх.ст.ном = 12.2222 V
UVD1 = 6.4 V
R1 := (Uвх.ном - 3 V - UVD1)/(4*10^-3 A) = 705.556 Ω
R1 := 750 Ω
PR1 := (4*10^-3 A)^2*R1 = 12 mW
# Выбор резистора R2
Uвых = 8 V
UVD1 = 6.4 V
R2 := (Uвых - UVD1)/(5*10^-3 A) = 320 Ω
R2 := 300 Ω
PR2расч := (Uвых - UVD1)^2/R2 = 8.53333 mW
IVD1 := 4 mA + (Uвых - UVD1)/R2 = 9.33333 mA
Iстmax = 1150 mA
# Выбор резисторов R3, R4, R5
Uвых = 8 V
Iнmax = 0.4 A
Uвых/(0.1*Iнmax) = 200 Ω
UVD1 = 6.4 V
UБЭVT4 := 0.6 V
R5расч := Uвых/(0.1*Iнmax)*(UVD1 + UБЭVT4)/Uвых = 175 Ω
R5 := 160 Ω
R3 := 43 Ω
PR3 := (0.1*Iнmax)^2*R3 = 68.8 mW
PR5 := (0.1*Iнmax)^2*R5 = 256 mW
# Выбор резисторов R6, R7
IKOVT1 = 5 mA
R7 := 2*Uвых/IKOVT1 = 3.2 kΩ
PR7 := IKOVT1^2*R7 = 80 mW
R7 := 3 kΩ
